*Nset, nset=top_nod
589145, 589146, 589147, 589148, 589149, 589150
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*Nset, nset=bot_nod
   5356,   5357,   5358,   5359,   5360,   5361
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** Section: Section-ASSEMBLY_VERT-1_NODESI_ELE_COR
*Solid Section, elset=NODESI_ELE_COR, material=BONE_COR
0.,
** Section: Section-ASSEMBLY_VERT-1_NODESI_ELE_TRA
*Solid Section, elset=NODESI_ELE_TRA, material=BONE_1
0.,
** Section: Section-ASSEMBLY_VERT-1_DESI_ELE_0
*Solid Section, elset=DESI_E_ELE0, material=CAGE_0
0.,
** Section: Section-ASSEMBLY_VERT-1_DESI_ELE_1
*Solid Section, elset=DESI_E_ELE1, material=CAGE_1
0.,
** Section: Section-ASSEMBLY_VERT-1_DESI_ELE_2
*Solid Section, elset=DESI_E_ELE2, material=CAGE_2
0.,
** Section: Section-ASSEMBLY_VERT-1_DESI_ELE_3
*Solid Section, elset=DESI_E_ELE3, material=CAGE_3
0.,
** Section: Section-ASSEMBLY_VERT-1_DESI_ELE_4
*Solid Section, elset=DESI_E_ELE4, material=CAGE_4
0.,
** Section: Section-ASSEMBLY_VERT-1_DESI_ELE_5
*Solid Section, elset=DESI_E_ELE5, material=CAGE_5
0.,
** Section: Section-ASSEMBLY_VERT-1_DESI_ELE_6
*Solid Section, elset=DESI_E_ELE6, material=CAGE_6
0.,
** Section: Section-ASSEMBLY_VERT-1_DESI_ELE_7
*Solid Section, elset=DESI_E_ELE7, material=CAGE_7
0.,
** Section: Section-ASSEMBLY_VERT-1_DESI_ELE_8
*Solid Section, elset=DESI_E_ELE8, material=CAGE_8
0.,
** Section: Section-ASSEMBLY_VERT-1_DESI_ELE_9
*Solid Section, elset=DESI_E_ELE9, material=CAGE_9
0.,
** Section: Section-ASSEMBLY_VERT-1_DESI_ELE_10
*Solid Section, elset=DESI_E_ELE10, material=CAGE_10
0.,
** Section: Section-ASSEMBLY_VERT-1_DESI_ELE_11
*Solid Section, elset=DESI_E_ELE11, material=CAGE_11
0.,
** Section: Section-ASSEMBLY_VERT-1_DESI_ELE_12
*Solid Section, elset=DESI_E_ELE12, material=CAGE_12
0.,
** Section: Section-ASSEMBLY_VERT-1_DESI_ELE_13
*Solid Section, elset=DESI_E_ELE13, material=CAGE_13
0.,
** Section: Section-ASSEMBLY_VERT-1_DESI_ELE_14
*Solid Section, elset=DESI_E_ELE14, material=CAGE_14
0.,
** Section: Section-ASSEMBLY_VERT-1_DESI_ELE_15
*Solid Section, elset=DESI_E_ELE15, material=CAGE_15
0.,
** Section: Section-ASSEMBLY_VERT-1_DESI_ELE_16
*Solid Section, elset=DESI_E_ELE16, material=CAGE_16
0.,
** Section: Section-ASSEMBLY_VERT-1_DESI_ELE_17
*Solid Section, elset=DESI_E_ELE17, material=CAGE_17
0.,
** Section: Section-ASSEMBLY_VERT-1_DESI_ELE_18
*Solid Section, elset=DESI_E_ELE18, material=CAGE_18
0.,
** Section: Section-ASSEMBLY_VERT-1_DESI_ELE_19
*Solid Section, elset=DESI_E_ELE19, material=CAGE_19
0.,
** Section: Section-ASSEMBLY_VERT-1_DESI_ELE_20
*Solid Section, elset=DESI_E_ELE20, material=CAGE_20
0.,
** Section: Section-ASSEMBLY_VERT-1_DESI_ELE_21
*Solid Section, elset=DESI_E_ELE21, material=CAGE_21
0.,
** Section: Section-ASSEMBLY_VERT-1_DESI_ELE_22
*Solid Section, elset=DESI_E_ELE22, material=CAGE_22
0.,
** Section: Section-ASSEMBLY_VERT-1_DESI_ELE_23
*Solid Section, elset=DESI_E_ELE23, material=CAGE_23
0.,
** Section: Section-ASSEMBLY_VERT-1_DESI_ELE_24
*Solid Section, elset=DESI_E_ELE24, material=CAGE_24
0.,
** Section: Section-ASSEMBLY_VERT-1_DESI_ELE_25
*Solid Section, elset=DESI_E_ELE25, material=CAGE_25
0.,
** Section: Section-ASSEMBLY_VERT-1_DESI_ELE_26
*Solid Section, elset=DESI_E_ELE26, material=CAGE_26
0.,
** Section: Section-ASSEMBLY_VERT-1_DESI_ELE_27
*Solid Section, elset=DESI_E_ELE27, material=CAGE_27
0.,
** Section: Section-ASSEMBLY_VERT-1_DESI_ELE_28
*Solid Section, elset=DESI_E_ELE28, material=CAGE_28
0.,
** Section: Section-ASSEMBLY_VERT-1_DESI_ELE_29
*Solid Section, elset=DESI_E_ELE29, material=CAGE_29
0.,
** Section: Section-ASSEMBLY_VERT-1_DESI_ELE_30
*Solid Section, elset=DESI_E_ELE30, material=CAGE_30
0.,
** Section: Section-ASSEMBLY_VERT-1_DESI_ELE_31
*Solid Section, elset=DESI_E_ELE31, material=CAGE_31
0.,
** Section: Section-ASSEMBLY_VERT-1_DESI_ELE_32
*Solid Section, elset=DESI_E_ELE32, material=CAGE_32
0.,
** Section: Section-ASSEMBLY_VERT-1_DESI_ELE_33
*Solid Section, elset=DESI_E_ELE33, material=CAGE_33
0.,
** Section: Section-ASSEMBLY_VERT-1_DESI_ELE_34
*Solid Section, elset=DESI_E_ELE34, material=CAGE_34
0.,
** Section: Section-ASSEMBLY_VERT-1_DESI_ELE_35
*Solid Section, elset=DESI_E_ELE35, material=CAGE_35
0.,
** Section: Section-ASSEMBLY_VERT-1_DESI_ELE_36
*Solid Section, elset=DESI_E_ELE36, material=CAGE_36
0.,
** Section: Section-ASSEMBLY_VERT-1_DESI_ELE_37
*Solid Section, elset=DESI_E_ELE37, material=CAGE_37
0.,
** Section: Section-ASSEMBLY_VERT-1_DESI_ELE_38
*Solid Section, elset=DESI_E_ELE38, material=CAGE_38
0.,
** Section: Section-ASSEMBLY_VERT-1_DESI_ELE_39
*Solid Section, elset=DESI_E_ELE39, material=CAGE_39
0.,
** Section: Section-ASSEMBLY_VERT-1_DESI_ELE_40
*Solid Section, elset=DESI_E_ELE40, material=CAGE_40
0.,
** Section: Section-ASSEMBLY_VERT-1_DESI_ELE_41
*Solid Section, elset=DESI_E_ELE41, material=CAGE_41
0.,
** Section: Section-ASSEMBLY_VERT-1_DESI_ELE_42
*Solid Section, elset=DESI_E_ELE42, material=CAGE_42
0.,
** Section: Section-ASSEMBLY_VERT-1_DESI_ELE_43
*Solid Section, elset=DESI_E_ELE43, material=CAGE_43
0.,
** Section: Section-ASSEMBLY_VERT-1_DESI_ELE_44
*Solid Section, elset=DESI_E_ELE44, material=CAGE_44
0.,
** Section: Section-ASSEMBLY_VERT-1_DESI_ELE_45
*Solid Section, elset=DESI_E_ELE45, material=CAGE_45
0.,
** Section: Section-ASSEMBLY_VERT-1_DESI_ELE_46
*Solid Section, elset=DESI_E_ELE46, material=CAGE_46
0.,
** Section: Section-ASSEMBLY_VERT-1_DESI_ELE_47
*Solid Section, elset=DESI_E_ELE47, material=CAGE_47
0.,
** Section: Section-ASSEMBLY_VERT-1_DESI_ELE_48
*Solid Section, elset=DESI_E_ELE48, material=CAGE_48
0.,
** Section: Section-ASSEMBLY_VERT-1_DESI_ELE_49
*Solid Section, elset=DESI_E_ELE49, material=CAGE_49
0.,
** Section: Section-ASSEMBLY_VERT-1_DESI_ELE_50
*Solid Section, elset=DESI_E_ELE50, material=CAGE_50
0.,
** Section: Section-ASSEMBLY_VERT-1_DESI_ELE_51
*Solid Section, elset=DESI_E_ELE51, material=CAGE_51
0.,
** Section: Section-ASSEMBLY_VERT-1_DESI_ELE_52
*Solid Section, elset=DESI_E_ELE52, material=CAGE_52
0.,
** Section: Section-ASSEMBLY_VERT-1_DESI_ELE_53
*Solid Section, elset=DESI_E_ELE53, material=CAGE_53
0.,
** Section: Section-ASSEMBLY_VERT-1_DESI_ELE_54
*Solid Section, elset=DESI_E_ELE54, material=CAGE_54
0.,
** Section: Section-ASSEMBLY_VERT-1_DESI_ELE_55
*Solid Section, elset=DESI_E_ELE55, material=CAGE_55
0.,
** Section: Section-ASSEMBLY_VERT-1_DESI_ELE_56
*Solid Section, elset=DESI_E_ELE56, material=CAGE_56
0.,
** Section: Section-ASSEMBLY_VERT-1_DESI_ELE_57
*Solid Section, elset=DESI_E_ELE57, material=CAGE_57
0.,
** Section: Section-ASSEMBLY_VERT-1_DESI_ELE_58
*Solid Section, elset=DESI_E_ELE58, material=CAGE_58
0.,
** Section: Section-ASSEMBLY_VERT-1_DESI_ELE_59
*Solid Section, elset=DESI_E_ELE59, material=CAGE_59
0.,
** Section: Section-ASSEMBLY_VERT-1_DESI_ELE_60
*Solid Section, elset=DESI_E_ELE60, material=CAGE_60
0.,
** Section: Section-ASSEMBLY_VERT-1_DESI_ELE_61
*Solid Section, elset=DESI_E_ELE61, material=CAGE_61
0.,
** Section: Section-ASSEMBLY_VERT-1_DESI_ELE_62
*Solid Section, elset=DESI_E_ELE62, material=CAGE_62
0.,
** Section: Section-ASSEMBLY_VERT-1_DESI_ELE_63
*Solid Section, elset=DESI_E_ELE63, material=CAGE_63
0.,
** Section: Section-ASSEMBLY_VERT-1_DESI_ELE_64
*Solid Section, elset=DESI_E_ELE64, material=CAGE_64
0.,
** Section: Section-ASSEMBLY_VERT-1_DESI_ELE_65
*Solid Section, elset=DESI_E_ELE65, material=CAGE_65
0.,
** Section: Section-ASSEMBLY_VERT-1_DESI_ELE_66
*Solid Section, elset=DESI_E_ELE66, material=CAGE_66
0.,
** Section: Section-ASSEMBLY_VERT-1_DESI_ELE_67
*Solid Section, elset=DESI_E_ELE67, material=CAGE_67
0.,
** Section: Section-ASSEMBLY_VERT-1_DESI_ELE_68
*Solid Section, elset=DESI_E_ELE68, material=CAGE_68
0.,
** Section: Section-ASSEMBLY_VERT-1_DESI_ELE_69
*Solid Section, elset=DESI_E_ELE69, material=CAGE_69
0.,
** Section: Section-ASSEMBLY_VERT-1_DESI_ELE_70
*Solid Section, elset=DESI_E_ELE70, material=CAGE_70
0.,
** Section: Section-ASSEMBLY_VERT-1_DESI_ELE_71
*Solid Section, elset=DESI_E_ELE71, material=CAGE_71
0.,
** Section: Section-ASSEMBLY_VERT-1_DESI_ELE_72
*Solid Section, elset=DESI_E_ELE72, material=CAGE_72
0.,
** Section: Section-ASSEMBLY_VERT-1_DESI_ELE_73
*Solid Section, elset=DESI_E_ELE73, material=CAGE_73
0.,
** Section: Section-ASSEMBLY_VERT-1_DESI_ELE_74
*Solid Section, elset=DESI_E_ELE74, material=CAGE_74
0.,
** Section: Section-ASSEMBLY_VERT-1_DESI_ELE_75
*Solid Section, elset=DESI_E_ELE75, material=CAGE_75
0.,
** Section: Section-ASSEMBLY_VERT-1_DESI_ELE_76
*Solid Section, elset=DESI_E_ELE76, material=CAGE_76
0.,
** Section: Section-ASSEMBLY_VERT-1_DESI_ELE_77
*Solid Section, elset=DESI_E_ELE77, material=CAGE_77
0.,
** Section: Section-ASSEMBLY_VERT-1_DESI_ELE_78
*Solid Section, elset=DESI_E_ELE78, material=CAGE_78
0.,
** Section: Section-ASSEMBLY_VERT-1_DESI_ELE_79
*Solid Section, elset=DESI_E_ELE79, material=CAGE_79
0.,
** Section: Section-ASSEMBLY_VERT-1_DESI_ELE_80
*Solid Section, elset=DESI_E_ELE80, material=CAGE_80
0.,
** Section: Section-ASSEMBLY_VERT-1_DESI_ELE_81
*Solid Section, elset=DESI_E_ELE81, material=CAGE_81
0.,
** Section: Section-ASSEMBLY_VERT-1_DESI_ELE_82
*Solid Section, elset=DESI_E_ELE82, material=CAGE_82
0.,
** Section: Section-ASSEMBLY_VERT-1_DESI_ELE_83
*Solid Section, elset=DESI_E_ELE83, material=CAGE_83
0.,
** Section: Section-ASSEMBLY_VERT-1_DESI_ELE_84
*Solid Section, elset=DESI_E_ELE84, material=CAGE_84
0.,
** Section: Section-ASSEMBLY_VERT-1_DESI_ELE_85
*Solid Section, elset=DESI_E_ELE85, material=CAGE_85
0.,
** Section: Section-ASSEMBLY_VERT-1_DESI_ELE_86
*Solid Section, elset=DESI_E_ELE86, material=CAGE_86
0.,
** Section: Section-ASSEMBLY_VERT-1_DESI_ELE_87
*Solid Section, elset=DESI_E_ELE87, material=CAGE_87
0.,
** Section: Section-ASSEMBLY_VERT-1_DESI_ELE_88
*Solid Section, elset=DESI_E_ELE88, material=CAGE_88
0.,
** Section: Section-ASSEMBLY_VERT-1_DESI_ELE_89
*Solid Section, elset=DESI_E_ELE89, material=CAGE_89
0.,
** Section: Section-ASSEMBLY_VERT-1_DESI_ELE_90
*Solid Section, elset=DESI_E_ELE90, material=CAGE_90
0.,
** Section: Section-ASSEMBLY_VERT-1_DESI_ELE_91
*Solid Section, elset=DESI_E_ELE91, material=CAGE_91
0.,
** Section: Section-ASSEMBLY_VERT-1_DESI_ELE_92
*Solid Section, elset=DESI_E_ELE92, material=CAGE_92
0.,
** Section: Section-ASSEMBLY_VERT-1_DESI_ELE_93
*Solid Section, elset=DESI_E_ELE93, material=CAGE_93
0.,
** Section: Section-ASSEMBLY_VERT-1_DESI_ELE_94
*Solid Section, elset=DESI_E_ELE94, material=CAGE_94
0.,
** Section: Section-ASSEMBLY_VERT-1_DESI_ELE_95
*Solid Section, elset=DESI_E_ELE95, material=CAGE_95
0.,
** Section: Section-ASSEMBLY_VERT-1_DESI_ELE_96
*Solid Section, elset=DESI_E_ELE96, material=CAGE_96
0.,
** Section: Section-ASSEMBLY_VERT-1_DESI_ELE_97
*Solid Section, elset=DESI_E_ELE97, material=CAGE_97
0.,
** Section: Section-ASSEMBLY_VERT-1_DESI_ELE_98
*Solid Section, elset=DESI_E_ELE98, material=CAGE_98
0.,
** Section: Section-ASSEMBLY_VERT-1_DESI_ELE_99
*Solid Section, elset=DESI_E_ELE99, material=CAGE_99
0.,
** Section: Section-ASSEMBLY_VERT-1_DESI_ELE_100
*Solid Section, elset=DESI_E_ELE100, material=CAGE_100
0.,
** Section: Section-ASSEMBLY_VERT-1_OBJ_ELE_0
*Solid Section, elset=OBJ_E_ELE0, material=BONE_0
0.,
** Section: Section-ASSEMBLY_VERT-1_OBJ_ELE_1
*Solid Section, elset=OBJ_E_ELE1, material=BONE_1
0.,
** Section: Section-ASSEMBLY_VERT-1_OBJ_ELE_2
*Solid Section, elset=OBJ_E_ELE2, material=BONE_2
0.,
** Section: Section-ASSEMBLY_VERT-1_OBJ_ELE_3
*Solid Section, elset=OBJ_E_ELE3, material=BONE_3
0.,
** Section: Section-ASSEMBLY_VERT-1_OBJ_ELE_4
*Solid Section, elset=OBJ_E_ELE4, material=BONE_4
0.,
** Section: Section-ASSEMBLY_VERT-1_OBJ_ELE_5
*Solid Section, elset=OBJ_E_ELE5, material=BONE_5
0.,
** Section: Section-ASSEMBLY_VERT-1_OBJ_ELE_6
*Solid Section, elset=OBJ_E_ELE6, material=BONE_6
0.,
** Section: Section-ASSEMBLY_VERT-1_OBJ_ELE_7
*Solid Section, elset=OBJ_E_ELE7, material=BONE_7
0.,
** Section: Section-ASSEMBLY_VERT-1_OBJ_ELE_8
*Solid Section, elset=OBJ_E_ELE8, material=BONE_8
0.,
** Section: Section-ASSEMBLY_VERT-1_OBJ_ELE_9
*Solid Section, elset=OBJ_E_ELE9, material=BONE_9
0.,
** Section: Section-ASSEMBLY_VERT-1_OBJ_ELE_10
*Solid Section, elset=OBJ_E_ELE10, material=BONE_10
0.,
*End Part
**
**
** ASSEMBLY
**
*Assembly, name=Assembly
**
*Instance, name=VERT-1, part=VERT
*End Instance
**
*Node
      1,          46.200001,19.200001,7.8
      2,          48.599998,18.6,73.800003
*Nset, nset=m_Set-1
 1,
*Nset, nset=m_Set-2
 2,
*Surface, type=NODE, name=VERT-1_BOT_NOD_CNS_, internal
VERT-1.BOT_NOD, 1.
*Surface, type=NODE, name=VERT-1_TOP_NOD_CNS_, internal
VERT-1.TOP_NOD, 1.
** Constraint: Constraint-1
*Coupling, constraint name=Constraint-1, ref node=m_Set-1, surface=VERT-1_BOT_NOD_CNS_
*Kinematic
** Constraint: Constraint-2
*Coupling, constraint name=Constraint-2, ref node=m_Set-2, surface=VERT-1_TOP_NOD_CNS_
*Kinematic
*End Assembly
**
** MATERIALS
**
*Material, name=BONE_COR
*Density
 1e-06,
*Elastic
18000., 0.3
*Material, name=CAGE_0
*Density
 1e-06,
*Elastic
110., 0.3
*Material, name=CAGE_1
*Density
1e-06,
*Elastic
1100, 0.3
*Material, name=CAGE_2
*Density
1e-06,
*Elastic
2200, 0.3
*Material, name=CAGE_3
*Density
1e-06,
*Elastic
3300, 0.3
*Material, name=CAGE_4
*Density
1e-06,
*Elastic
4400, 0.3
*Material, name=CAGE_5
*Density
1e-06,
*Elastic
5500, 0.3
*Material, name=CAGE_6
*Density
1e-06,
*Elastic
6600, 0.3
*Material, name=CAGE_7
*Density
1e-06,
*Elastic
7700, 0.3
*Material, name=CAGE_8
*Density
1e-06,
*Elastic
8800, 0.3
*Material, name=CAGE_9
*Density
1e-06,
*Elastic
9900, 0.3
*Material, name=CAGE_10
*Density
1e-06,
*Elastic
11000, 0.3
*Material, name=CAGE_11
*Density
1e-06,
*Elastic
12100, 0.3
*Material, name=CAGE_12
*Density
1e-06,
*Elastic
13200, 0.3
*Material, name=CAGE_13
*Density
1e-06,
*Elastic
14300, 0.3
*Material, name=CAGE_14
*Density
1e-06,
*Elastic
15400, 0.3
*Material, name=CAGE_15
*Density
1e-06,
*Elastic
16500, 0.3
*Material, name=CAGE_16
*Density
1e-06,
*Elastic
17600, 0.3
*Material, name=CAGE_17
*Density
1e-06,
*Elastic
18700, 0.3
*Material, name=CAGE_18
*Density
1e-06,
*Elastic
19800, 0.3
*Material, name=CAGE_19
*Density
1e-06,
*Elastic
20900, 0.3
*Material, name=CAGE_20
*Density
1e-06,
*Elastic
22000, 0.3
*Material, name=CAGE_21
*Density
1e-06,
*Elastic
23100, 0.3
*Material, name=CAGE_22
*Density
1e-06,
*Elastic
24200, 0.3
*Material, name=CAGE_23
*Density
1e-06,
*Elastic
25300, 0.3
*Material, name=CAGE_24
*Density
1e-06,
*Elastic
26400, 0.3
*Material, name=CAGE_25
*Density
1e-06,
*Elastic
27500, 0.3
*Material, name=CAGE_26
*Density
1e-06,
*Elastic
28600, 0.3
*Material, name=CAGE_27
*Density
1e-06,
*Elastic
29700, 0.3
*Material, name=CAGE_28
*Density
1e-06,
*Elastic
30800, 0.3
*Material, name=CAGE_29
*Density
1e-06,
*Elastic
31900, 0.3
*Material, name=CAGE_30
*Density
1e-06,
*Elastic
33000, 0.3
*Material, name=CAGE_31
*Density
1e-06,
*Elastic
34100, 0.3
*Material, name=CAGE_32
*Density
1e-06,
*Elastic
35200, 0.3
*Material, name=CAGE_33
*Density
1e-06,
*Elastic
36300, 0.3
*Material, name=CAGE_34
*Density
1e-06,
*Elastic
37400, 0.3
*Material, name=CAGE_35
*Density
1e-06,
*Elastic
38500, 0.3
*Material, name=CAGE_36
*Density
1e-06,
*Elastic
39600, 0.3
*Material, name=CAGE_37
*Density
1e-06,
*Elastic
40700, 0.3
*Material, name=CAGE_38
*Density
1e-06,
*Elastic
41800, 0.3
*Material, name=CAGE_39
*Density
1e-06,
*Elastic
42900, 0.3
*Material, name=CAGE_40
*Density
1e-06,
*Elastic
44000, 0.3
*Material, name=CAGE_41
*Density
1e-06,
*Elastic
45100, 0.3
*Material, name=CAGE_42
*Density
1e-06,
*Elastic
46200, 0.3
*Material, name=CAGE_43
*Density
1e-06,
*Elastic
47300, 0.3
*Material, name=CAGE_44
*Density
1e-06,
*Elastic
48400, 0.3
*Material, name=CAGE_45
*Density
1e-06,
*Elastic
49500, 0.3
*Material, name=CAGE_46
*Density
1e-06,
*Elastic
50600, 0.3
*Material, name=CAGE_47
*Density
1e-06,
*Elastic
51700, 0.3
*Material, name=CAGE_48
*Density
1e-06,
*Elastic
52800, 0.3
*Material, name=CAGE_49
*Density
1e-06,
*Elastic
53900, 0.3
*Material, name=CAGE_50
*Density
1e-06,
*Elastic
55000, 0.3
*Material, name=CAGE_51
*Density
1e-06,
*Elastic
56100, 0.3
*Material, name=CAGE_52
*Density
1e-06,
*Elastic
57200, 0.3
*Material, name=CAGE_53
*Density
1e-06,
*Elastic
58300, 0.3
*Material, name=CAGE_54
*Density
1e-06,
*Elastic
59400, 0.3
*Material, name=CAGE_55
*Density
1e-06,
*Elastic
60500, 0.3
*Material, name=CAGE_56
*Density
1e-06,
*Elastic
61600, 0.3
*Material, name=CAGE_57
*Density
1e-06,
*Elastic
62700, 0.3
*Material, name=CAGE_58
*Density
1e-06,
*Elastic
63800, 0.3
*Material, name=CAGE_59
*Density
1e-06,
*Elastic
64900, 0.3
*Material, name=CAGE_60
*Density
1e-06,
*Elastic
66000, 0.3
*Material, name=CAGE_61
*Density
1e-06,
*Elastic
67100, 0.3
*Material, name=CAGE_62
*Density
1e-06,
*Elastic
68200, 0.3
*Material, name=CAGE_63
*Density
1e-06,
*Elastic
69300, 0.3
*Material, name=CAGE_64
*Density
1e-06,
*Elastic
70400, 0.3
*Material, name=CAGE_65
*Density
1e-06,
*Elastic
71500, 0.3
*Material, name=CAGE_66
*Density
1e-06,
*Elastic
72600, 0.3
*Material, name=CAGE_67
*Density
1e-06,
*Elastic
73700, 0.3
*Material, name=CAGE_68
*Density
1e-06,
*Elastic
74800, 0.3
*Material, name=CAGE_69
*Density
1e-06,
*Elastic
75900, 0.3
*Material, name=CAGE_70
*Density
1e-06,
*Elastic
77000, 0.3
*Material, name=CAGE_71
*Density
1e-06,
*Elastic
78100, 0.3
*Material, name=CAGE_72
*Density
1e-06,
*Elastic
79200, 0.3
*Material, name=CAGE_73
*Density
1e-06,
*Elastic
80300, 0.3
*Material, name=CAGE_74
*Density
1e-06,
*Elastic
81400, 0.3
*Material, name=CAGE_75
*Density
1e-06,
*Elastic
82500, 0.3
*Material, name=CAGE_76
*Density
1e-06,
*Elastic
83600, 0.3
*Material, name=CAGE_77
*Density
1e-06,
*Elastic
84700, 0.3
*Material, name=CAGE_78
*Density
1e-06,
*Elastic
85800, 0.3
*Material, name=CAGE_79
*Density
1e-06,
*Elastic
86900, 0.3
*Material, name=CAGE_80
*Density
1e-06,
*Elastic
88000, 0.3
*Material, name=CAGE_81
*Density
1e-06,
*Elastic
89100, 0.3
*Material, name=CAGE_82
*Density
1e-06,
*Elastic
90200, 0.3
*Material, name=CAGE_83
*Density
1e-06,
*Elastic
91300, 0.3
*Material, name=CAGE_84
*Density
1e-06,
*Elastic
92400, 0.3
*Material, name=CAGE_85
*Density
1e-06,
*Elastic
93500, 0.3
*Material, name=CAGE_86
*Density
1e-06,
*Elastic
94600, 0.3
*Material, name=CAGE_87
*Density
1e-06,
*Elastic
95700, 0.3
*Material, name=CAGE_88
*Density
1e-06,
*Elastic
96800, 0.3
*Material, name=CAGE_89
*Density
1e-06,
*Elastic
97900, 0.3
*Material, name=CAGE_90
*Density
1e-06,
*Elastic
99000, 0.3
*Material, name=CAGE_91
*Density
1e-06,
*Elastic
100100, 0.3
*Material, name=CAGE_92
*Density
1e-06,
*Elastic
101200, 0.3
*Material, name=CAGE_93
*Density
1e-06,
*Elastic
102300, 0.3
*Material, name=CAGE_94
*Density
1e-06,
*Elastic
103400, 0.3
*Material, name=CAGE_95
*Density
1e-06,
*Elastic
104500, 0.3
*Material, name=CAGE_96
*Density
1e-06,
*Elastic
105600, 0.3
*Material, name=CAGE_97
*Density
1e-06,
*Elastic
106700, 0.3
*Material, name=CAGE_98
*Density
1e-06,
*Elastic
107800, 0.3
*Material, name=CAGE_99
*Density
1e-06,
*Elastic
108900, 0.3
*Material, name=CAGE_100
*Density
1e-06,
*Elastic
110000, 0.3
*Material, name=BONE_0
*Density
 1e-06,
*Elastic
12., 0.3
*Material, name=BONE_1
*Density
 1e-06,
*Elastic
1200., 0.3
*Material, name=BONE_2
*Density
 1e-06,
*Elastic
2400., 0.3
*Material, name=BONE_3
*Density
 1e-06,
*Elastic
3600., 0.3
*Material, name=BONE_4
*Density
 1e-06,
*Elastic
4800., 0.3
*Material, name=BONE_5
*Density
 1e-06,
*Elastic
6000., 0.3
*Material, name=BONE_6
*Density
 1e-06,
*Elastic
7200., 0.3
*Material, name=BONE_7
*Density
 1e-06,
*Elastic
8400., 0.3
*Material, name=BONE_8
*Density
 1e-06,
*Elastic
9600., 0.3
*Material, name=BONE_9
*Density
 1e-06,
*Elastic
10800., 0.3
*Material, name=BONE_10
*Density
 1e-06,
*Elastic
12000., 0.3
**
** BOUNDARY CONDITIONS
**
** Name: Disp-BC-1 Type: Displacement
*Boundary
M_SET-1, ENCASTRE
** ----------------------------------------------------------------
**
** STEP: Load
**
*Step, name=Load, nlgeom=NO, solver=ITERATIVE
*Static
1., 1., 1e-05, 1.
**
** LOADS
**
** Name: CFORCE-2   Type: Moment
*Cload, op=NEW
M_SET-2, 5, -7500.
**
** OUTPUT REQUESTS
**
*Restart, write, number interval=1, time marks=NO
**
** FIELD OUTPUT: F-Output-2
**
*Output, field
*Element Output, elset=VERT-1.ALLE, directions=NO
ENER, E, S,
**
** FIELD OUTPUT: F-Output-1
**
*Node Output, nset=VERT-1.ALLN
U,
**
** HISTORY OUTPUT: H-Output-1
**
*Output, history, variable=PRESELECT
*End Step
